**
**   Structure: cube.
**   Test objective: equations with 2 terms.
**
*HEADING
Model: balk
*NODE
1,0.,0.,0.
2,1.,0.,0.
3,1.,1.,0.
4,0.,1.,0.
5,0.,0.,1.
6,1.,0.,1.
7,1.,1.,1.
8,0.,1.,1.
9,.25,0.,0.
10,.5,0.,0.
11,.75,0.,0.
12,1.,.25,0.
13,1.,.5,0.
14,1.,.75,0.
15,.75,1.,0.
16,.5,1.,0.
17,.25,1.,0.
18,0.,.75,0.
19,0.,.5,0.
20,0.,.25,0.
21,.25,0.,1.
22,.5,0.,1.
23,.75,0.,1.
24,1.,.25,1.
25,1.,.5,1.
26,1.,.75,1.
27,.75,1.,1.
28,.5,1.,1.
29,.25,1.,1.
30,0.,.75,1.
31,0.,.5,1.
32,0.,.25,1.
33,1.,0.,.25
34,1.,0.,.5
35,1.,0.,.75
36,0.,0.,.75
37,0.,0.,.5
38,0.,0.,.25
39,1.,1.,.25
40,1.,1.,.5
41,1.,1.,.75
42,0.,1.,.25
43,0.,1.,.5
44,0.,1.,.75
45,.5,.25,0.
46,.25,.5,0.
47,.5,.5,0.
48,.75,.5,0.
49,.5,.75,0.
50,.5,.25,1.
51,.25,.5,1.
52,.5,.5,1.
53,.75,.5,1.
54,.5,.75,1.
55,.5,0.,.25
56,.25,0.,.5
57,.5,0.,.5
58,.75,0.,.5
59,.5,0.,.75
60,1.,.5,.25
61,1.,.25,.5
62,1.,.5,.5
63,1.,.75,.5
64,1.,.5,.75
65,.5,1.,.25
66,.75,1.,.5
67,.5,1.,.5
68,.25,1.,.5
69,.5,1.,.75
70,0.,.5,.25
71,0.,.75,.5
72,0.,.5,.5
73,0.,.25,.5
74,0.,.5,.75
75,.5,.5,.25
76,.5,.25,.5
77,.25,.5,.5
78,.5,.5,.5
79,.75,.5,.5
80,.5,.75,.5
81,.5,.5,.75
156,.25,0.,.5
157,.5,0.,.5
158,.75,0.,.5
161,1.,.25,.5
162,1.,.5,.5
163,1.,.75,.5
166,.75,1.,.5
167,.5,1.,.5
168,.25,1.,.5
171,0.,.75,.5
172,0.,.5,.5
173,0.,.25,.5
176,.5,.25,.5
177,.25,.5,.5
178,.5,.5,.5
179,.75,.5,.5
180,.5,.75,.5
*ELEMENT, TYPE=C3D20R
1,1,10,47,19,37,57,78,72,9,45,
46,20,56,76,77,73,38,55,75,70
2,10,2,13,47,57,34,62,78,11,12,
48,45,58,61,79,76,55,33,60,75
3,19,47,16,4,72,78,67,43,46,49,
17,18,77,80,68,71,70,75,65,42
4,47,13,3,16,78,62,40,67,48,14,
15,49,79,63,66,80,75,60,39,65
5,37,157,178,172,5,22,52,31,156,176,
177,173,21,50,51,32,36,59,81,74
6,157,34,162,178,22,6,25,52,158,161,
179,176,23,24,53,50,59,35,64,81
7,172,178,167,43,31,52,28,8,177,180,
168,171,51,54,29,30,74,81,69,44
8,178,162,40,167,52,25,7,28,179,163,
166,180,53,26,27,54,81,64,41,69
*BOUNDARY
1,1
1,2
1,3
2,2
2,3
4,3
*EQUATION
    2
  178,    1,        1.,   78,    1,       -1.
    2
  178,    2,        1.,   78,    2,       -1.
    2
  178,    3,        1.,   78,    3,       -1.
*MATERIAL,NAME=EL
*ELASTIC
210000.,.3
*NSET,NSET=SET1,GENERATE
1,180
*ELSET,ELSET=SET2,GENERATE
1,8
*ELSET,ELSET=EALL,GENERATE
1,8
*SOLID SECTION,MATERIAL=EL,ELSET=EALL
*STEP
*STATIC
*CLOAD
5,3,1.
6,3,1.
7,3,1.
8,3,1.
*NODE PRINT,NSET=SET1
U
*EL PRINT,ELSET=SET2
S
*NODE FILE
U
*EL FILE
S
*END STEP
